x := transpose([
    298, 299, 300, 301, 302, 303, 304, 305, 306, 307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])
y := transpose([
    52.10600931, 52.13031399, 52.15471698, 52.17921749, 52.20381472, 52.22850788, 52.25329618, 52.27817883, 52.30315502, 52.32822398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])
k := 3
s := regress(x, y, k)
t := 1, 1.5 .. 340
L(t) := interp(s, x, y, t)
b := submatrix(s, 3, length(s) - 1, 0, 0)
b = [43.9884; 0.023099; 1.52251e-5; -1.00794e-8]
L(300) = 52.0162
f(m) := L(m)
F(w) := [1, w, w^2, w^3, w^4]*b
F(300) =  # error: Размерности массива не совпадают.
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integral(F(w), w = 293 .. 333)/(333 - 293) =  # error: Это вычисление не приближается к решению.
